# OpenSim document version 30000
Model:
  ForceSet:
    Thelen2003Muscle muscle0: max_isometric_force=546 optimal_fiber_length=0.0535 tendon_slack_length=0.078
        pennation_angle=0 activation_time_constant=0.01 deactivation_time_constant=0.04 Vmax=10 Vmax0=5
        FmaxTendonStrain=0.033 FmaxMuscleStrain=0.6 KshapeActive=0.5 KshapePassive=4 damping=0.05 Af=0.3 Flen=1.8
      PathPoint muscle0_node0: shoulder (0.0403232 0.02643615 -0.01153302)
      PathPoint muscle0_node4: lowerArm (0.02542955 -0.004003791 -0.07637261)
    Thelen2003Muscle muscle1: max_isometric_force=546 optimal_fiber_length=0.0535 tendon_slack_length=0.078
        pennation_angle=0 activation_time_constant=0.01 deactivation_time_constant=0.04 Vmax=10 Vmax0=5
        FmaxTendonStrain=0.033 FmaxMuscleStrain=0.6 KshapeActive=0.5 KshapePassive=4 damping=0.05 Af=0.3 Flen=1.8
      PathPoint muscle1_node0: shoulder (0.03884988 -0.02856385 -0.01153302)
      PathPoint muscle1_node4: lowerArm (0.02558075 -0.03400379 -0.06637261)
    Thelen2003Muscle muscle2: max_isometric_force=546 optimal_fiber_length=0.0535 tendon_slack_length=0.078
        pennation_angle=0 activation_time_constant=0.01 deactivation_time_constant=0.04 Vmax=10 Vmax0=5
        FmaxTendonStrain=0.033 FmaxMuscleStrain=0.6 KshapeActive=0.5 KshapePassive=4 damping=0.05 Af=0.3 Flen=1.8
      PathPoint muscle2_node0: shoulder (-0.04032189 0.02643615 -0.01153302)
      PathPoint muscle2_node4: lowerArm (-0.02544383 -0.004003791 -0.07637261)
    Thelen2003Muscle muscle3: max_isometric_force=546 optimal_fiber_length=0.0535 tendon_slack_length=0.078
        pennation_angle=0 activation_time_constant=0.01 deactivation_time_constant=0.04 Vmax=10 Vmax0=5
        FmaxTendonStrain=0.033 FmaxMuscleStrain=0.6 KshapeActive=0.5 KshapePassive=4 damping=0.05 Af=0.3 Flen=1.8
      PathPoint muscle3_node0: shoulder (-0.03884856 -0.02856385 -0.01153302)
      PathPoint muscle3_node4: lowerArm (-0.02559502 -0.03400379 -0.06637261)
